// COMSOL Multiphysics 5.3.1.348 model "2beads2.mph"
// Outline of the model tree

Parameters
  alpha = 1  // non-dimensional \alpha
  K = 320  // bending rigidity of bare membrane
  g = 0.2  // slope of transition
  mu = -1  // non-dimensional \mu\phi
  beta = 1  // non-dimensional \beta
  k0 = 0  // bending rigidiy difference
  sigma0 = 2  // non-dimensional \sigma
  a0 = 0  // non-dimensional distance between beads

Variables
  var1 "Variables 1"
    sigma = (0.5*sigma0*(1 - tanh(g*(20+a0-x)))-0.5*sigma0*(1 - tanh(g*(40+a0-x))))+(0.5*sigma0*(1 - tanh(g*(60-a0-x)))-0.5*sigma0*(1 - tanh(g*(80-a0-x))))  // protein density distribution

Geometry
  geom1 "Geometry 1" (1D, length unit m)
    i1: Interval | p2 = 100; p = {0, 100}
    i2: Interval (disabled) | p1 = 10; p2 = 50; p = {10, 50}
    fin: Finalize "Form Union"

Physics
  g: GeneralFormPDE "t-1" on all domains
    dependent variable u = {x1, y, phy, h, L, lambda}
    ShapeProperty.order = 1
    gfeq1: GeneralFormPDE (default)
      f = {d(x1,x)-cos(phy), d(y,x)-sin(phy), x1*d(phy,x)-2*x1*h+sin(phy), x1*d(h,x)-L-x1*mu*d(sigma,x)+x1*d(k,x)/k*(h-mu*sigma), d(L,x)/x1-(2*h*((h-mu*sigma)^2+lambda/k)-2*(h-mu*sigma)*(h^2+(h-sin(phy)/x1)^2)+2*h/k*(-(alpha)*sigma^2+beta*d(sigma,x)^2)-d(k,x)/(x1*k)*L-d(d(kG,x),x)/(k*x1)*sin(phy)-d(kG,x)/(k*x1)*cos(phy)*(2*h-sin(phy)/x1)), d(lambda,x)-2*(k*mu*(h-mu*sigma)+alpha*(sigma))*d(sigma,x)+2*beta*d(sigma,x)*d(d(sigma,x),x)+d(k,x)*((h-mu*sigma)^2)+d(kG,x)*(h^2-(h-sin(phy)/x1)^2)}
      Ga = {0, 0, 0, 0, 0, 0}
      da = {0, 0, 0, 0, 0, 0, 0, 0, 0, 0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}
    zflx1: ZeroFluxBoundary "Zero Flux 1" (default)
    init1: init "Initial Values 1" (default)
      x1 = 1
      y = (x)/(2*1*pi)
      phy = pi/2
      h = 1/(2*1)
      L = 0
      lambda = 1/(4*1^2)
      x2 = 1
      y2 = (60-x)/(2*1*pi)
      phy2 = -pi/2
      h2 = -1/2
      lambda2 = 1/4
      x3 = 1
      y3 = (60-x)/(2*1*pi)
      phy3 = -pi/2
      h3 = -1/2
      lambda3 = 1/4
    dir1: DirichletBoundary "Dirichlet Boundary Condition 1" on boundaries 1
      r = {1, 0, pi/2, 0, 0, 8}
      useDirichletCondition = {1, 1, 1, 0, 0, 1}
    dir2: DirichletBoundary "Dirichlet Boundary Condition 2" on boundaries 2
      r = {1, 0, pi/2, 0, 0, 1/(4*1^2)}
      useDirichletCondition = {1, 0, 1, 0, 0, 0}

Mesh
  mesh1 "Mesh 1"
    size: MeshSizeDefault | hmax = 0.02; hgrad = 1; custom = on
    edg1: Edge on domains 1
    ref1: Refine (disabled) on all domains
    size1: Size (disabled) on entire geometry | hmax = 0.05; custom = on
    edg2: Edge (disabled) on no domains

Studies
  std1 "sigma and a0 sweep"
    param: Parametric "Parametric Sweep"
      sweeptype = filled
      pname = {sigma0, a0}
      plistarr = {range(0,0.25,15), range(0,0.25,10)}
      punit = {, }
    stat: Stationary

Solver configurations
  sol1 "Solution 1" (study std1)
    v1: Variables "Dependent Variables 1"
    s1: Stationary "Stationary Solver 1"
      dDef: Direct
      p1: Parametric
        sweeptype = filled
        pname = {sigma0, a0}
        plistarr = {range(0,0.25,15), range(0,0.25,10)}
        punit = {, }
        pcontinuationmode = manual
        pcontinuation = sigma0
        ponerror = empty
      fc1: FullyCoupled | linsolver = dDef

Datasets
  dset1: Solution | solution = sol1