// COMSOL Multiphysics 5.3.1.348 model "k0-sigma02.mph"
// Outline of the model tree

Parameters
  alpha = 1  // non-dimensional \alpha
  k0 = 10  // bending rigidity difference
  g = 0.2  // slope of transition
  mu = -1  // non-dimensional \mu\phi
  sigma0 = 0  // non-dimensional \sigma
  beta = 1  // non-dimensional \beta
  lam0 = 8  // non-dimensional tension at boundary
  R0 = 200  // initial radius of cylinder
  K = 320  // bending rigidity of bare membrane

Variables
  var1 "Variables 1"
    sigma = (0.5*sigma0*(1 - tanh(g*(40-x)))-0.5*sigma0*(1 - tanh(g*(60-x))))  // protein density distribution
    k = (0.5*k0*(1 - tanh(g*(40-x)))-0.5*k0*(1 - tanh(g*(60-x))))+1  // bending rigidity distribution

Geometry
  geom1 "Geometry 1" (1D, length unit m)
    i1: Interval | p2 = 100; p = {0, 100}
    i2: Interval (disabled) | p1 = 10; p2 = 50; p = {10, 50}
    pt1: Point | p = 50
    fin: Finalize "Form Union"

Physics
  g: GeneralFormPDE "t-1" on all domains
    dependent variable u = {x1, y, phy, h, L, lambda}
    ShapeProperty.order = 1
    gfeq1: GeneralFormPDE (default)
      f = {d(x1,x)-cos(phy), d(y,x)-sin(phy), x1*d(phy,x)-2*x1*h+sin(phy), x1*d(h,x)-L-x1*mu*d(sigma,x)+x1*d(k,x)/k*(h-mu*sigma), d(L,x)/x1-(2*h*((h-mu*sigma)^2+lambda/k)-2*(h-mu*sigma)*(h^2+(h-sin(phy)/x1)^2)+2*h/k*(-(alpha)*sigma^2+beta*d(sigma,x)^2)-d(k,x)/(x1*k)*L), d(lambda,x)-2*(k*mu*(h-mu*sigma)+alpha*(sigma))*d(sigma,x)+2*beta*d(sigma,x)*d(d(sigma,x),x)+d(k,x)*((h-mu*sigma)^2)}
      Ga = {0, 0, 0, 0, 0, 0}
      da = {0, 0, 0, 0, 0, 0, 0, 0, 0, 0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}
    zflx1: ZeroFluxBoundary "Zero Flux 1" (default)
    init1: init "Initial Values 1" (default)
      x1 = 1
      y = (x)/(2*1*pi)
      phy = pi/2
      h = 1/(2*1)
      L = 0
      lambda = 1/(4*1^2)
      x2 = 1
      y2 = (60-x)/(2*1*pi)
      phy2 = -pi/2
      h2 = -1/2
      lambda2 = 1/4
      x3 = 1
      y3 = (60-x)/(2*1*pi)
      phy3 = -pi/2
      h3 = -1/2
      lambda3 = 1/4
    dir1: DirichletBoundary "Dirichlet Boundary Condition 1" on boundaries 1
      r = {1, 0, pi/2, 0, 0, lam0}
      useDirichletCondition = {1, 1, 1, 0, 0, 1}
    dir2: DirichletBoundary "Dirichlet Boundary Condition 2" on boundaries 3
      r = {1, 0, pi/2, 0, 0, 1/(4*1^2)}
      useDirichletCondition = {1, 0, 1, 0, 0, 0}

Mesh
  mesh1 "Mesh 1"
    size: MeshSizeDefault | hmax = 0.005; hgrad = 1; custom = on
    edg1: Edge on domains 1, 2
    ref1: Refine (disabled) on all domains
    size1: Size (disabled) on entire geometry | hmax = 0.05; custom = on
    edg2: Edge (disabled) on no domains

Studies
  std14 "k0 sweep"
    param: Parametric "Parametric Sweep" | pname = k0; plistarr = range(0,1,10)
    stat: Stationary
  std16 "sigma sweep-k0=0"
    param: Parametric "Parametric Sweep" | pname = sigma0; plistarr = range(0,0.2,15)
    stat: Stationary | useinitsol = on; initmethod = sol; initstudy = std14
  std17 "sigma sweep-k0=1"
    param: Parametric "Parametric Sweep" | pname = sigma0; plistarr = range(0,0.2,15)
    stat: Stationary | useinitsol = on; initmethod = sol; initstudy = std14
  std18 "sigma sweep-k0=2"
    param: Parametric "Parametric Sweep" | pname = sigma0; plistarr = range(0,0.2,15)
    stat: Stationary | useinitsol = on; initmethod = sol; initstudy = std14
  std19 "sigma sweep-k0-3"
    param: Parametric "Parametric Sweep" | pname = sigma0; plistarr = range(0,0.2,15)
    stat: Stationary | useinitsol = on; initmethod = sol; initstudy = std14
  std20 "sigma sweep-k0=4"
    param: Parametric "Parametric Sweep" | pname = sigma0; plistarr = range(0,0.2,15)
    stat: Stationary | useinitsol = on; initmethod = sol; initstudy = std14
  std21 "sigma sweep-k0=5"
    param: Parametric "Parametric Sweep" | pname = sigma0; plistarr = range(0,0.2,15)
    stat: Stationary | useinitsol = on; initmethod = sol; initstudy = std14
  std22 "sigma sweep-k0=6"
    param: Parametric "Parametric Sweep" | pname = sigma0; plistarr = range(0,0.2,15)
    stat: Stationary | useinitsol = on; initmethod = sol; initstudy = std14
  std23 "sigma sweep-k0=7"
    param: Parametric "Parametric Sweep" | pname = sigma0; plistarr = range(0,0.2,15)
    stat: Stationary | useinitsol = on; initmethod = sol; initstudy = std14
  std24 "sigma sweep-k0=8"
    param: Parametric "Parametric Sweep" | pname = sigma0; plistarr = range(0,0.2,15)
    stat: Stationary | useinitsol = on; initmethod = sol; initstudy = std14
  std25 "sigma sweep-k0=9"
    param: Parametric "Parametric Sweep" | pname = sigma0; plistarr = range(0,0.2,15)
    stat: Stationary | useinitsol = on; initmethod = sol; initstudy = std14
  std26 "sigma sweep-k0=10"
    param: Parametric "Parametric Sweep" | pname = sigma0; plistarr = range(0,0.2,15)
    stat: Stationary | useinitsol = on; initmethod = sol; initstudy = std14

Solver configurations
  sol14 "Solution 14" (study std14)
    v1: Variables "Dependent Variables 1"
    s1: Stationary "Stationary Solver 1"
      dDef: Direct
      p1: Parametric | pname = k0; plistarr = range(0,1,10); pcontinuationmode = manual
      fc1: FullyCoupled | linsolver = dDef
  sol16 "Solution 16" (study std16)
    v1: Variables "Dependent Variables 1"
    s1: Stationary "Stationary Solver 1"
      dDef: Direct
      p1: Parametric | pname = sigma0; plistarr = range(0,0.2,15); pcontinuationmode = manual
      fc1: FullyCoupled | linsolver = dDef
  sol17 "Solution 17" (study std17)
    // same settings as sol16
  sol18 "Solution 18" (study std18)
    // same settings as sol16
  sol19 "Solution 19" (study std19)
    // same settings as sol16
  sol20 "Solution 20" (study std20)
    // same settings as sol16
  sol21 "Solution 21" (study std21)
    // same settings as sol16
  sol22 "Solution 22" (study std22)
    // same settings as sol16
  sol23 "Solution 23" (study std23)
    // same settings as sol16
  sol24 "Solution 24" (study std24)
    // same settings as sol16
  sol25 "Solution 25" (study std25)
    // same settings as sol16
  sol26 "Solution 26" (study std26)
    // same settings as sol16

Datasets
  dset14: Solution | solution = sol14
  dset16: Solution | solution = sol16
  dset17: Solution | solution = sol17
  dset18: Solution | solution = sol18
  dset19: Solution | solution = sol19
  dset20: Solution | solution = sol20
  dset21: Solution | solution = sol21
  dset22: Solution | solution = sol22
  dset23: Solution | solution = sol23
  dset24: Solution | solution = sol24
  dset25: Solution | solution = sol25
  dset26: Solution | solution = sol26

Derived values
  pev1: EvalPoint "Point Evaluation 1" on boundaries 2 | data = dset26; table = tbl2; expr = h^2-(h-sin(phy)/x1)^2

Tables
  tbl2: Table
    // Point Evaluation 1 (h^2-(h-sin(phy)/x1)^2)
    sigma0 | h^2-(h-sin(phy)/x1)^2 (1), Point: 2
    0 | 0.00853423
    0.2 | 0.0147084
    0.4 | 0.0133931
    0.6 | 0.0109428
    0.8 | 0.00827284
    1 | 0.00539871
    1.2 | 0.00216227
    1.4 | -0.00173044
    1.6 | -0.00729203